*NODE, NSET=Nall
       1,5.000000000000e-01,0.000000000000e+00,0.000000000000e+00
       2,7.500000000000e-01,0.000000000000e+00,0.000000000000e+00
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*ELEMENT, TYPE=S8, ELSET=Eshell,DLOAD
   109,    219,222,221,220,226,225,224,223
*ELEMENT, TYPE=C3D10, ELSET=Eall
   110,    62,    61,    60,   229,    64,    63,    65,   240,   241,   242
   111,   228,    22,   170,    14,   243,   180,   245,   246,    52,   179
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** Names based on fix
*NSET,NSET=Nfix
1,
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*BOUNDARY
Nfix,1,3
*MATERIAL,NAME=EL
*ELASTIC
210000.,.0
*SOLID SECTION,ELSET=Eall,MATERIAL=EL
*NSET,NSET=N1
*STEP
*STATIC
*DLOAD
109, I, 100.000000
*REFINE MESH,LIMIT=5.
ERR
*NODE FILE,NSET=N1
ERR
*NODE PRINT,NSET=Nfix,TOTALS=YES
RF
*END STEP
